# Adapted for FermiLink benchmark use from:
# https://github.com/i-pi/i-pi/blob/main/examples/clients/lammps/h2o_pimd.4/in.lmp
# and
# https://github.com/i-pi/i-pi/blob/main/examples/init_files/water_216_data.lmp
#
# Large system: replicate 4x total via a 2x2x1 tiling (approx. 864 waters).

units           electron
atom_style      full

pair_style      lj/cut/tip4p/long 1 2 1 1 0.278072379 17.007
bond_style      class2
angle_style     harmonic
kspace_style    pppm/tip4p 0.0001

read_data       water_216_data.lmp
pair_coeff      * * 0 0
pair_coeff      1 1 0.000295147 5.96946

variable repx equal 2
variable repy equal 2
variable repz equal 1
replicate ${repx} ${repy} ${repz}

# Maxwell-Boltzmann initialization at 300 K (case-specific deterministic seed).
velocity        all create 300.0 323451 dist gaussian mom yes rot yes

neighbor        2.0 bin
timestep        0.5

thermo_style    custom step atoms temp etotal pe ke press density
thermo          100

fix             1 all nve
run             4000
